*Heading
** Job name: SingleCrack Model name: Model-1
** Generated by: Abaqus/CAE 6.14-1
*Preprint, echo=NO, model=NO, history=NO, contact=NO
**
** PARTS
**
*Part, name=Part-1
*Node
      1,         -20.,           0.
      2,          -8.,           0.
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*********************** RECTENGULAR ***************************
*User element, nodes=4, type=U2, properties=3, coordinates=2, VARIABLES=8
3
***************************************************************
*User element, nodes=4, type=U4, properties=4, coordinates=2, VARIABLES=56
1,2
***************************************************************
*********************** TRIANGULAR ****************************
*User element, nodes=3, type=U1, properties=3, coordinates=2, VARIABLES=6
3
***************************************************************
*User element, nodes=3, type=U3, properties=4, coordinates=2, VARIABLES=42
1,2
***************************************************************
***************************************************************
*Element, type=U2
1, 1,  23, 695, 175
2, 23,  24, 696, 695
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***************************************************************
*Element, type=U4
8889, 1,  23, 695, 175
8890, 23,  24, 696, 695
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***************************************************************
*Element, type=U1
2017, 3757, 5373, 3573
2018, 5407, 2628, 5231
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***************************************************************
*Element, type=U3
10905, 3757, 5373, 3573
10906, 5407, 2628, 5231
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***************************************************************
********************** ASSIGNING MATERIAL PROP ****************
*Elset, elset=Set-1, generate
    1,  8888,     1
***************************************************************
*Uel property, elset=Set-1
0.4, 0.027, 1
**lc, gc, h
***************************************************************
*Elset, elset=Set-1_SS, generate
8889, 17776, 1
***************************************************************
*Uel property, elset=Set-1_SS
210, 0.3, 1, 1e-09
**E, nu, h, k
***************************************************************
*Element, type=CPE4
17777, 1,  23, 695, 175
17778, 23,  24, 696, 695
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***************************************************************
*Element, type=CPE3
19793, 3757, 5373, 3573
19794, 5407, 2628, 5231
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***************************************************************
*Elset, elset=umatelem, generate
17777, 26664, 1
***************************************************************
*Solid Section, elset=umatelem, material=Material-1
1.0
*End Part
**
**
** ASSEMBLY
**
*Assembly, name=Assembly
**
*Instance, name=Part-1-1, part=Part-1
*End Instance
**
*Nset, nset=bottom, instance=Part-1-1
  21,  22, 637, 638, 639, 640
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*Elset, elset=bottom, instance=Part-1-1
 5549, 5550, 5551, 5578, 5579, 5595
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*Nset, nset=btm_left, instance=Part-1-1
 21,
*Nset, nset=top, instance=Part-1-1
  17,  18, 536, 537, 538, 539
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*Elset, elset=top, instance=Part-1-1
 2117, 2118, 2119, 2206, 2217, 2218
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**
*Elset, elset=umatelem, instance=Part-1-1, generate
17777, 26664, 1
**
*End Assembly
***************************************************************
*Amplitude, name=Amp-1, time=TOTAL TIME
             0.,              0.,             14,             0.14
**
** MATERIALS
**
*Material, name=Material-1
*Depvar
     16,
*User Material, constants=2
 1e-13, 0.3
** ----------------------------------------------------------------
**
** STEP: Step-1
**
*Step, name=Step-1, nlgeom=NO, inc=1200
*Static, direct
0.01, 12.,
**
** BOUNDARY CONDITIONS
**
** Name: BC-1 Type: Displacement/Rotation
*Boundary
bottom, 2, 2
** Name: BC-2 Type: Displacement/Rotation
*Boundary
btm_left, 1, 1
** Name: BC-3 Type: Displacement/Rotation
*Boundary, amplitude=Amp-1
top, 2, 2, 1.
**
** OUTPUT REQUESTS
**
*Restart, write, frequency=0
**
** FIELD OUTPUT: F-Output-1
**
*Output, field,frequency=100
**
** HISTORY OUTPUT: H-Output-1
**
*Node Output
U,
*element output, elset=umatelem
SDV
**
*End Step
** ----------------------------------------------------------------
**
** STEP: Step-2
**
*Step, name=Step-2, nlgeom=NO, inc=2000
*Static, direct
0.001, 2.,
**
** OUTPUT REQUESTS
**
*Restart, write, frequency=0
**
** FIELD OUTPUT: F-Output-1
**
*Output, field,frequency=100
**
** HISTORY OUTPUT: H-Output-1
**
*node output
U,
*element output, elset=umatelem
SDV
**
*End Step
